*Heading
** Job name: PaperModel-0PCT-FineMesh-1105 Model name: PaperModel-0PCT-FineMesh-1105
** Generated by: Abaqus/CAE 2019
*Preprint, echo=NO, model=NO, history=NO, contact=NO
**
** PARTS
**
*Part, name=Composite
*Node
      1,  0.649999976,  0.649999976,          10.
      2,  0.584999979,  0.649999976,          10.
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*Element, type=C3D8
    1,  1352,  1353,    35,    34, 13862, 13863,  4027,  4028
    2,  1353,  1354,    36,    35, 13863, 13864,  4026,  4027
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*Nset, nset=Set-1
     2,     3,     4,     5,     7,     8
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*Elset, elset=Set-1, generate
 12401,  46000,      1
*Nset, nset=Set-2
     1,     2,     3,     4,     5,     6
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*Elset, elset=Set-2, generate
     1,  12400,      1
** Section: Fiber
*Solid Section, elset=Set-2, material=Fiber
,
** Section: Matrix
*Solid Section, elset=Set-1, material=Vitrimer
,
*End Part
**
**
** ASSEMBLY
**
*Assembly, name=Assembly
**
*Instance, name=Composite-1, part=Composite
*End Instance
**
*Nset, nset=Set-1, instance=Composite-1
     1,     3,     6,     7,    10,    11
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*Elset, elset=Set-1, instance=Composite-1
     1,     2,     3,     4,     5,     6
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*Nset, nset=Set-2, instance=Composite-1
     1,     2,     5,     6,     8,    13
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*Elset, elset=Set-2, instance=Composite-1
     6,    12,    18,    24,    30,    36
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*Nset, nset=Set-3, instance=Composite-1
    5,    6,    7,   11,   12,   13
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*Elset, elset=Set-3, instance=Composite-1
 12339, 12340, 12341, 12342, 12343, 12344
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*Nset, nset=Set-4, instance=Composite-1, generate
     1,  51858,      1
*Elset, elset=Set-4, instance=Composite-1, generate
     1,  46000,      1
*Nset, nset=Set-5, instance=Composite-1, generate
     1,  51858,      1
*Elset, elset=Set-5, instance=Composite-1, generate
     1,  46000,      1
*End Assembly
*Amplitude, name=Cooling1
             0.,           163.1,             60.,           161.4,            120.,           158.9,            180.,           155.8
           240.,           153.5,            300.,           150.6,            360.,            148.,            420.,           145.2
           480.,            142.,            540.,           138.7,            600.,           135.4,            660.,           131.9
           720.,           128.7,            780.,           125.2,            840.,           121.7,            900.,            119.
           960.,           115.9,           1020.,           112.6,           1080.,            110.,           1140.,           107.4
          1200.,           104.3,           1260.,           101.3,           1320.,            97.8,           1380.,            95.3
          1440.,            92.4,           1500.,            89.6,           1560.,            86.6,           1620.,            84.2
          1680.,            81.7,           1740.,            78.9,           1800.,            76.2,           1860.,            73.5
          1920.,            71.4,           1980.,            68.8,           2040.,            65.9,           2100.,            64.1
          2160.,            61.5,           2220.,            58.7,           2280.,             56.,           2340.,             54.
          2400.,            51.4,           2460.,             49.,           2520.,            46.1,           2580.,            43.7
          2640.,            40.8,           2700.,            38.2,           2760.,            35.3,           2820.,            32.5
*Amplitude, name=Cooling2
             0.,           197.3,             60.,           196.6,            120.,           194.9,            180.,            192.
           240.,           188.4,            300.,           185.4,            360.,           182.3,            420.,            179.
           480.,            176.,            540.,           172.9,            600.,           169.7,            660.,           166.7
           720.,           163.7,            780.,           160.4,            840.,           157.2,            900.,           154.4
           960.,           151.1,           1020.,           147.9,           1080.,           145.2,           1140.,           142.2
          1200.,           139.3,           1260.,           136.4,           1320.,           133.5,           1380.,           130.6
          1440.,           128.1,           1500.,           125.5,           1560.,           122.7,           1620.,           120.5
          1680.,            118.,           1740.,           115.8,           1800.,           113.6,           1860.,           110.8
          1920.,            109.,           1980.,           106.6,           2040.,           104.2,           2100.,           102.2
          2160.,            99.5,           2220.,            97.8,           2280.,            95.9,           2340.,            93.8
          2400.,             92.,           2460.,            89.9,           2520.,            87.9,           2580.,            86.1
          2640.,            84.1,           2700.,            82.3,           2760.,            80.6,           2820.,            78.9
          2880.,            76.9,           2940.,            75.3,           3000.,            73.8,           3060.,             72.
          3120.,            70.4,           3180.,            68.8,           3240.,            67.3,           3300.,            65.5
          3360.,            64.1,           3420.,             62.,           3480.,            59.3,           3540.,            56.3
          3600.,            53.2,           3660.,            49.8,           3720.,            46.2,           3780.,            42.9
          3840.,            39.4,           3900.,            35.7,           3960.,            33.7,           4020.,            31.7
*Amplitude, name=Curing
             0.,           163.1,             60.,           163.1,            120.,           163.1,            180.,           163.1
           240.,           163.1,            300.,           163.1,            360.,           163.1,            420.,           163.1
           480.,           163.1,            540.,           163.1,            600.,           163.1,            660.,           163.1
           720.,           163.1,            780.,           163.1,            840.,           163.1,            900.,           163.1
           960.,           163.1,           1020.,           163.1,           1080.,           163.1,           1140.,           163.1
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         86400.,           163.1
*Amplitude, name=Heating
             0.,            25.4,             60.,            26.6,            120.,            30.5,            180.,            34.6
           240.,            39.1,            300.,             43.,            360.,            47.2,            420.,            51.5
           480.,             55.,            540.,             59.,            600.,            62.7,            660.,            66.9
           720.,            70.4,            780.,            74.8,            840.,            78.8,            900.,            82.7
           960.,             87.,           1020.,            90.9,           1080.,            95.4,           1140.,            98.5
          1200.,           102.8,           1260.,            107.,           1320.,           111.1,           1380.,           115.7
          1440.,           118.9,           1500.,           122.8,           1560.,           127.7,           1620.,           131.4
          1680.,           135.4,           1740.,           140.4,           1800.,           143.8,           1860.,           148.1
          1920.,            152.,           1980.,           156.3,           2040.,           159.7,           2100.,           163.9
          2160.,           168.2,           2220.,           172.8,           2280.,           176.6,           2340.,           180.3
          2400.,           182.1
*Amplitude, name=Hold1_LT
             0.,            32.5,             60.,            31.6,            120.,            31.7,            180.,            30.2
           240.,            30.4,            300.,            30.7,            360.,            29.3,            420.,            28.9
           480.,            29.6,            540.,            28.5,            600.,             29.,            660.,            28.3
           720.,            27.6,            780.,            28.1,            840.,            27.3,            900.,            27.2
           960.,            27.7,           1020.,            27.2,           1080.,            26.8,           1140.,            27.1
          1200.,            26.8,           1260.,            26.6,           1320.,            26.6,           1380.,            26.2
          1440.,            26.1,           1500.,            26.3,           1560.,            25.9,           1620.,            26.3
          1680.,            26.7,           1740.,            26.3,           1800.,            26.1,           1860.,            25.8
          1920.,            25.9,           1980.,            25.7,           2040.,            25.7,           2100.,            25.4
          2160.,            25.7,           2220.,            25.9,           2280.,            25.7,           2340.,            25.5
          2400.,            25.4,           2460.,            25.3,           2520.,            25.4,           2580.,            25.3
          2640.,            25.4,           2700.,            25.4
*Amplitude, name=Hold2_HT
             0.,           182.1,             60.,           183.4,            120.,           184.2,            180.,           185.8
           240.,           185.7,            300.,           186.7,            360.,           187.7,            420.,           187.9
           480.,           188.4,            540.,           189.7,            600.,           190.6,            660.,           190.6
           720.,           190.6,            780.,           191.2,            840.,           191.5,            900.,           191.9
           960.,           192.6,           1020.,           192.2,           1080.,           192.8,           1140.,           192.9
          1200.,           193.8,           1260.,           193.4,           1320.,           193.9,           1380.,           193.7
          1440.,           193.9,           1500.,           194.5,           1560.,           194.8,           1620.,           194.5
          1680.,           195.2,           1740.,           194.9,           1800.,           195.2,           1860.,           195.3
          1920.,           195.2,           1980.,           195.6,           2040.,           195.7,           2100.,           195.8
          2160.,           195.7,           2220.,           195.7,           2280.,           195.9,           2340.,           195.4
          2400.,           196.2,           2460.,           196.3,           2520.,           196.3,           2580.,           195.9
          2640.,           196.4,           2700.,           196.6,           2760.,           196.5,           2820.,           197.1
          2880.,           196.2,           2940.,           196.6,           3000.,           196.4,           3060.,           196.7
          3120.,           197.2,           3180.,           197.3,           3240.,           196.9,           3300.,           196.9
          3360.,           197.4,           3420.,           196.8,           3480.,           197.3
*Amplitude, name=Hold3_LT
             0.,            31.7,             60.,            31.3,            120.,            31.2,            180.,            31.2
           240.,            29.8,            300.,            30.3,            360.,            29.8,            420.,            29.1
           480.,            28.4,            540.,            28.9,            600.,            28.1,            660.,            28.2
           720.,            27.8,            780.,            27.3,            840.,            27.2,            900.,            27.5
           960.,            27.1,           1020.,            26.7,           1080.,            26.9,           1140.,            26.7
          1200.,            26.4,           1260.,            26.8,           1320.,            26.6,           1380.,            26.2
          1440.,            26.1,           1500.,            26.5,           1560.,            26.4,           1620.,            26.2
          1680.,             26.,           1740.,            25.7,           1800.,            25.9,           1860.,            25.7
          1920.,            25.7,           1980.,            25.8,           2040.,            25.6,           2100.,            25.6
          2160.,            25.7,           2220.,            25.5,           2280.,            25.6,           2340.,            25.8
          2400.,            25.7,           2460.,            25.6,           2520.,            25.5,           2580.,            25.4
          2640.,            25.7
**
** MATERIALS
**
*Material, name=Fiber
*Elastic
22500., 0.15
*Expansion
 1e-05,
*Material, name=Vitrimer
*Depvar
    157,
*User Material, constants=19
1000.,     13.1868,     1157.36,     12.4347,       1200.,     212490., 1.29361e+06,   0.0002486
        900.,          4.,      0.0001,         50.,        205.,    1.75e-05,   0.0019458,    -3.51712
     52.4274,         10.,         20.
**
** BOUNDARY CONDITIONS
**
** Name: Xsym Type: Symmetry/Antisymmetry/Encastre
*Boundary
Set-1, XSYMM
** Name: Ysym Type: Symmetry/Antisymmetry/Encastre
*Boundary
Set-2, YSYMM
** Name: Zsym Type: Symmetry/Antisymmetry/Encastre
*Boundary
Set-3, ZSYMM
**
** PREDEFINED FIELDS
**
** Name: Initial Temperature   Type: Temperature
*Initial Conditions, type=TEMPERATURE
Set-4, 163.1
** ----------------------------------------------------------------
**
** STEP: Curing
**
*Step, name=Curing, nlgeom=YES, inc=50000
*Static
500., 86400., 0.0864, 500.
**
** PREDEFINED FIELDS
**
** Name: Curing   Type: Temperature
*Temperature, amplitude=Curing
Set-5, 1.
**
** OUTPUT REQUESTS
**
*Restart, write, frequency=0
**
** FIELD OUTPUT: F-Output-1
**
*Output, field, frequency=10
*Node Output
NT, U
*Element Output, directions=YES
LE, S, SDV, TEMP
**
** HISTORY OUTPUT: H-Output-1
**
*Output, history, variable=PRESELECT, frequency=5
*End Step
** ----------------------------------------------------------------
**
** STEP: Cooling1
**
*Step, name=Cooling1, nlgeom=YES, inc=5000
*Static
40., 2820., 0.0282, 40.
**
** PREDEFINED FIELDS
**
** Name: Cooling1   Type: Temperature
*Temperature, amplitude=Cooling1
Set-4, 1.
**
** OUTPUT REQUESTS
**
*Restart, write, frequency=0
**
** FIELD OUTPUT: F-Output-1
**
*Output, field, frequency=10
*Node Output
NT, U
*Element Output, directions=YES
LE, S, SDV, TEMP
**
** HISTORY OUTPUT: H-Output-1
**
*Output, history, variable=PRESELECT, frequency=5
*End Step
** ----------------------------------------------------------------
**
** STEP: Hold1_LT
**
*Step, name=Hold1_LT, nlgeom=YES, inc=5000
*Static
40., 2700., 0.027, 40.
**
** PREDEFINED FIELDS
**
** Name: Hold1_LT   Type: Temperature
*Temperature, amplitude=Hold1_LT
Set-4, 1.
**
** OUTPUT REQUESTS
**
*Restart, write, frequency=0
**
** FIELD OUTPUT: F-Output-1
**
*Output, field, frequency=10
*Node Output
NT, U
*Element Output, directions=YES
LE, S, SDV, TEMP
**
** HISTORY OUTPUT: H-Output-1
**
*Output, history, variable=PRESELECT, frequency=5
*End Step
** ----------------------------------------------------------------
**
** STEP: Heating
**
*Step, name=Heating, nlgeom=YES, inc=5000
*Static
40., 2400., 0.024, 40.
**
** PREDEFINED FIELDS
**
** Name: Heating   Type: Temperature
*Temperature, amplitude=Heating
Set-4, 1.
**
** OUTPUT REQUESTS
**
*Restart, write, frequency=0
**
** FIELD OUTPUT: F-Output-1
**
*Output, field, frequency=10
*Node Output
NT, U
*Element Output, directions=YES
LE, S, SDV, TEMP
**
** HISTORY OUTPUT: H-Output-1
**
*Output, history, variable=PRESELECT, frequency=5
*End Step
** ----------------------------------------------------------------
**
** STEP: Hold2_HT
**
*Step, name=Hold2_HT, nlgeom=YES, inc=5000
*Static
40., 3480., 0.0348, 40.
**
** PREDEFINED FIELDS
**
** Name: Hold2_HT   Type: Temperature
*Temperature, amplitude=Hold2_HT
Set-4, 1.
**
** OUTPUT REQUESTS
**
*Restart, write, frequency=0
**
** FIELD OUTPUT: F-Output-1
**
*Output, field, frequency=10
*Node Output
NT, U
*Element Output, directions=YES
LE, S, SDV, TEMP
**
** HISTORY OUTPUT: H-Output-1
**
*Output, history, variable=PRESELECT, frequency=5
*End Step
** ----------------------------------------------------------------
**
** STEP: Cooling2
**
*Step, name=Cooling2, nlgeom=YES, inc=5000
*Static
40., 4020., 0.0402, 40.
**
** PREDEFINED FIELDS
**
** Name: Cooling2   Type: Temperature
*Temperature, amplitude=Cooling2
Set-4, 1.
**
** OUTPUT REQUESTS
**
*Restart, write, frequency=0
**
** FIELD OUTPUT: F-Output-1
**
*Output, field, frequency=10
*Node Output
NT, U
*Element Output, directions=YES
LE, S, SDV, TEMP
**
** HISTORY OUTPUT: H-Output-1
**
*Output, history, variable=PRESELECT, frequency=5
*End Step
** ----------------------------------------------------------------
**
** STEP: Hold3_LT
**
*Step, name=Hold3_LT, nlgeom=YES, inc=5000
*Static
40., 2460., 0.0246, 40.
**
** PREDEFINED FIELDS
**
** Name: Hold3_LT   Type: Temperature
*Temperature, amplitude=Hold3_LT
Set-4, 1.
**
** OUTPUT REQUESTS
**
*Restart, write, frequency=0
**
** FIELD OUTPUT: F-Output-1
**
*Output, field, frequency=10
*Node Output
NT, U
*Element Output, directions=YES
E, EE, LE, MISES, MISESMAX, S, SDV, TEMP, TRIAX
**
** HISTORY OUTPUT: H-Output-1
**
*Output, history, variable=PRESELECT, frequency=5
*End Step
