** This is a comment line
** This input file is used to simulate the TMA experiment for 0% catalyst vitrimer.
** The 5% catalyst simulation is similar, requiring only parameter adjustments.
*Heading
** Job name: Purevitrimer-0pcnt-FixZ-1113-TMA Model name: Purevitrimer-0pcnt-FixZ-1113-TMA
** Generated by: Abaqus/CAE 2019
*Preprint, echo=NO, model=NO, history=NO, contact=NO
**
** PARTS
**
*Part, name=Vitrimer
*Node
      1,           1.,           1.,           1.
      2,           1.,  0.666666687,           1.
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*Element, type=C3D8
 1, 17, 18, 22, 21,  1,  2,  6,  5
 2, 18, 19, 23, 22,  2,  3,  7,  6
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*Nset, nset=Set-1, generate
  1,  64,   1
*Elset, elset=Set-1, generate
  1,  27,   1
** Section: Matrix
*Solid Section, elset=Set-1, material=Vitrimer
,
*End Part
**
**
** ASSEMBLY
**
*Assembly, name=Assembly
**
*Instance, name=Vitrimer-1, part=Vitrimer
*End Instance
**
*Nset, nset=Set-1, instance=Vitrimer-1, generate
  1,  16,   1
*Elset, elset=Set-1, instance=Vitrimer-1, generate
 1,  9,  1
*Nset, nset=Set-2, instance=Vitrimer-1, generate
  1,  61,   4
*Elset, elset=Set-2, instance=Vitrimer-1, generate
  1,  25,   3
*Nset, nset=Set-3, instance=Vitrimer-1
 13, 14, 15, 16, 29, 30, 31, 32, 45, 46, 47, 48, 61, 62, 63, 64
*Elset, elset=Set-3, instance=Vitrimer-1
  7,  8,  9, 16, 17, 18, 25, 26, 27
*Nset, nset=Set-4, instance=Vitrimer-1
 52,
*Nset, nset=Set-5, instance=Vitrimer-1, generate
  1,  64,   1
*Elset, elset=Set-5, instance=Vitrimer-1, generate
  1,  27,   1
*Nset, nset=Set-6, instance=Vitrimer-1, generate
  1,  61,   4
*Elset, elset=Set-6, instance=Vitrimer-1, generate
  1,  25,   3
*Nset, nset=Set-7, instance=Vitrimer-1, generate
  4,  64,   4
*Elset, elset=Set-7, instance=Vitrimer-1, generate
  3,  27,   3
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*Nset, nset=Set-13, instance=Vitrimer-1, generate
 49,  64,   1
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*Nset, nset=Set-15, instance=Vitrimer-1
 52,
*Nset, nset=Set-16, instance=Vitrimer-1, generate
  1,  61,   4
*Elset, elset=Set-16, instance=Vitrimer-1, generate
  1,  25,   3
*Nset, nset=Set-17, instance=Vitrimer-1
  1,  2,  3,  4, 17, 18, 19, 20, 33, 34, 35, 36, 49, 50, 51, 52
*Elset, elset=Set-17, instance=Vitrimer-1
  1,  2,  3, 10, 11, 12, 19, 20, 21
*Nset, nset=Set-18, instance=Vitrimer-1
 13, 14, 15, 16, 29, 30, 31, 32, 45, 46, 47, 48, 61, 62, 63, 64
*Elset, elset=Set-18, instance=Vitrimer-1
  7,  8,  9, 16, 17, 18, 25, 26, 27
*Nset, nset=Set-19, instance=Vitrimer-1, generate
  1,  64,   1
*Elset, elset=Set-19, instance=Vitrimer-1, generate
  1,  27,   1
*End Assembly
*Amplitude, name=Cooling1
             0.,           163.1,             60.,           161.4,            120.,           158.9,            180.,           155.8
           240.,           153.5,            300.,           150.6,            360.,            148.,            420.,           145.2
           480.,            142.,            540.,           138.7,            600.,           135.4,            660.,           131.9
           720.,           128.7,            780.,           125.2,            840.,           121.7,            900.,            119.
           960.,           115.9,           1020.,           112.6,           1080.,            110.,           1140.,           107.4
          1200.,           104.3,           1260.,           101.3,           1320.,            97.8,           1380.,            95.3
          1440.,            92.4,           1500.,            89.6,           1560.,            86.6,           1620.,            84.2
          1680.,            81.7,           1740.,            78.9,           1800.,            76.2,           1860.,            73.5
          1920.,            71.4,           1980.,            68.8,           2040.,            65.9,           2100.,            64.1
          2160.,            61.5,           2220.,            58.7,           2280.,             56.,           2340.,             54.
          2400.,            51.4,           2460.,             49.,           2520.,            46.1,           2580.,            43.7
          2640.,            40.8,           2700.,            38.2,           2760.,            35.3,           2820.,            32.5
*Amplitude, name=Cooling2
             0.,           197.3,             60.,           196.6,            120.,           194.9,            180.,            192.
           240.,           188.4,            300.,           185.4,            360.,           182.3,            420.,            179.
           480.,            176.,            540.,           172.9,            600.,           169.7,            660.,           166.7
           720.,           163.7,            780.,           160.4,            840.,           157.2,            900.,           154.4
           960.,           151.1,           1020.,           147.9,           1080.,           145.2,           1140.,           142.2
          1200.,           139.3,           1260.,           136.4,           1320.,           133.5,           1380.,           130.6
          1440.,           128.1,           1500.,           125.5,           1560.,           122.7,           1620.,           120.5
          1680.,            118.,           1740.,           115.8,           1800.,           113.6,           1860.,           110.8
          1920.,            109.,           1980.,           106.6,           2040.,           104.2,           2100.,           102.2
          2160.,            99.5,           2220.,            97.8,           2280.,            95.9,           2340.,            93.8
          2400.,             92.,           2460.,            89.9,           2520.,            87.9,           2580.,            86.1
          2640.,            84.1,           2700.,            82.3,           2760.,            80.6,           2820.,            78.9
          2880.,            76.9,           2940.,            75.3,           3000.,            73.8,           3060.,             72.
          3120.,            70.4,           3180.,            68.8,           3240.,            67.3,           3300.,            65.5
          3360.,            64.1,           3420.,             62.,           3480.,            59.3,           3540.,            56.3
          3600.,            53.2,           3660.,            49.8,           3720.,            46.2,           3780.,            42.9
          3840.,            39.4,           3900.,            35.7,           3960.,            33.7,           4020.,            31.7
*Amplitude, name=Curing
             0.,           163.1,             60.,           163.1,            120.,           163.1,            180.,           163.1
           240.,           163.1,            300.,           163.1,            360.,           163.1,            420.,           163.1
           480.,           163.1,            540.,           163.1,            600.,           163.1,            660.,           163.1
           720.,           163.1,            780.,           163.1,            840.,           163.1,            900.,           163.1
           960.,           163.1,           1020.,           163.1,           1080.,           163.1,           1140.,           163.1
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         86400.,           163.1
*Amplitude, name=Heating
             0.,            25.4,             60.,            26.6,            120.,            30.5,            180.,            34.6
           240.,            39.1,            300.,             43.,            360.,            47.2,            420.,            51.5
           480.,             55.,            540.,             59.,            600.,            62.7,            660.,            66.9
           720.,            70.4,            780.,            74.8,            840.,            78.8,            900.,            82.7
           960.,             87.,           1020.,            90.9,           1080.,            95.4,           1140.,            98.5
          1200.,           102.8,           1260.,            107.,           1320.,           111.1,           1380.,           115.7
          1440.,           118.9,           1500.,           122.8,           1560.,           127.7,           1620.,           131.4
          1680.,           135.4,           1740.,           140.4,           1800.,           143.8,           1860.,           148.1
          1920.,            152.,           1980.,           156.3,           2040.,           159.7,           2100.,           163.9
          2160.,           168.2,           2220.,           172.8,           2280.,           176.6,           2340.,           180.3
          2400.,           182.1
*Amplitude, name=Hold1_LT
             0.,            32.5,             60.,            31.6,            120.,            31.7,            180.,            30.2
           240.,            30.4,            300.,            30.7,            360.,            29.3,            420.,            28.9
           480.,            29.6,            540.,            28.5,            600.,             29.,            660.,            28.3
           720.,            27.6,            780.,            28.1,            840.,            27.3,            900.,            27.2
           960.,            27.7,           1020.,            27.2,           1080.,            26.8,           1140.,            27.1
          1200.,            26.8,           1260.,            26.6,           1320.,            26.6,           1380.,            26.2
          1440.,            26.1,           1500.,            26.3,           1560.,            25.9,           1620.,            26.3
          1680.,            26.7,           1740.,            26.3,           1800.,            26.1,           1860.,            25.8
          1920.,            25.9,           1980.,            25.7,           2040.,            25.7,           2100.,            25.4
          2160.,            25.7,           2220.,            25.9,           2280.,            25.7,           2340.,            25.5
          2400.,            25.4,           2460.,            25.3,           2520.,            25.4,           2580.,            25.3
          2640.,            25.4,           2700.,            25.4
*Amplitude, name=Hold2_HT
             0.,           182.1,             60.,           183.4,            120.,           184.2,            180.,           185.8
           240.,           185.7,            300.,           186.7,            360.,           187.7,            420.,           187.9
           480.,           188.4,            540.,           189.7,            600.,           190.6,            660.,           190.6
           720.,           190.6,            780.,           191.2,            840.,           191.5,            900.,           191.9
           960.,           192.6,           1020.,           192.2,           1080.,           192.8,           1140.,           192.9
          1200.,           193.8,           1260.,           193.4,           1320.,           193.9,           1380.,           193.7
          1440.,           193.9,           1500.,           194.5,           1560.,           194.8,           1620.,           194.5
          1680.,           195.2,           1740.,           194.9,           1800.,           195.2,           1860.,           195.3
          1920.,           195.2,           1980.,           195.6,           2040.,           195.7,           2100.,           195.8
          2160.,           195.7,           2220.,           195.7,           2280.,           195.9,           2340.,           195.4
          2400.,           196.2,           2460.,           196.3,           2520.,           196.3,           2580.,           195.9
          2640.,           196.4,           2700.,           196.6,           2760.,           196.5,           2820.,           197.1
          2880.,           196.2,           2940.,           196.6,           3000.,           196.4,           3060.,           196.7
          3120.,           197.2,           3180.,           197.3,           3240.,           196.9,           3300.,           196.9
          3360.,           197.4,           3420.,           196.8,           3480.,           197.3
*Amplitude, name=Hold3_LT
             0.,            31.7,             60.,            31.3,            120.,            31.2,            180.,            31.2
           240.,            29.8,            300.,            30.3,            360.,            29.8,            420.,            29.1
           480.,            28.4,            540.,            28.9,            600.,            28.1,            660.,            28.2
           720.,            27.8,            780.,            27.3,            840.,            27.2,            900.,            27.5
           960.,            27.1,           1020.,            26.7,           1080.,            26.9,           1140.,            26.7
          1200.,            26.4,           1260.,            26.8,           1320.,            26.6,           1380.,            26.2
          1440.,            26.1,           1500.,            26.5,           1560.,            26.4,           1620.,            26.2
          1680.,             26.,           1740.,            25.7,           1800.,            25.9,           1860.,            25.7
          1920.,            25.7,           1980.,            25.8,           2040.,            25.6,           2100.,            25.6
          2160.,            25.7,           2220.,            25.5,           2280.,            25.6,           2340.,            25.8
          2400.,            25.7,           2460.,            25.6,           2520.,            25.5,           2580.,            25.4
          2640.,            25.7
*Amplitude, name=Temp_down
          0.004,        219.8214,     0.004166667,        219.8158,          0.0125,         219.813,      0.02083334,         219.821
     0.02916666,        219.8186,          0.0375,          219.82,      0.04583334,        219.8191,      0.05416668,         219.819
         0.0625,        219.8192,      0.07083332,        219.8106,      0.07916666,        219.8092,          0.0875,        219.8058
     0.09583332,        219.7987,       0.1041666,        219.7969,          0.1125,        219.7852,       0.1208333,         219.781
      0.1291666,        219.7727,          0.1375,        219.7607,       0.1458333,         219.748,       0.1541667,        219.7336
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        43.9625,        1.482356,        43.97083,         1.44287,        43.97917,        1.398878,         43.9875,        1.351205
*Amplitude, name=Temp_up
          0.004,              0.,     0.004166667,              0.,          0.0125,              0.,      0.02083334,              0.
     0.02916666,              0.,          0.0375,              0.,      0.04583334,              0.,      0.05416668,              0.
         0.0625,              0.,      0.07083332,              0.,      0.07916666,              0.,          0.0875,              0.
     0.09583332,              0.,       0.1041666,              0.,          0.1125,              0.,       0.1208333,              0.
      0.1291666,              0.,          0.1375,              0.,       0.1458333,              0.,       0.1541667,              0.
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        43.9625,        218.5314,        43.97083,        218.5818,        43.97917,         218.622,         43.9875,        218.6599
**
** MATERIALS
**
*Material, name=Vitrimer
*Depvar
    157,
*User Material, constants=19
1000.,     13.1868,     1157.36,     12.4347,       1200.,     212490., 1.29361e+06,   0.0002486
        900.,          4.,      0.0001,         50.,        205.,    1.75e-05,      0.0077,    -3.51712
     52.4274,         10.,         20.
**
** BOUNDARY CONDITIONS
**
** Name: BC-2 Type: Displacement/Rotation
*Boundary
Set-17, 3, 3
** Name: BC-3 Type: Displacement/Rotation
*Boundary
Set-18, 3, 3
** Name: BC-4 Type: Symmetry/Antisymmetry/Encastre
*Boundary
Set-13, XSYMM
** Name: BC-5 Type: Symmetry/Antisymmetry/Encastre
*Boundary
Set-16, YSYMM
** Name: BC-6 Type: Displacement/Rotation
*Boundary
Set-15, 1, 1
Set-15, 2, 2
Set-15, 3, 3
Set-15, 4, 4
Set-15, 5, 5
Set-15, 6, 6
**
** PREDEFINED FIELDS
**
** Name: Initial Temp   Type: Temperature
*Initial Conditions, type=TEMPERATURE
Set-5, 0.
** ----------------------------------------------------------------
**
** STEP: Temp_up
**
*Step, name=Temp_up, nlgeom=YES, inc=90000
*Static
0.01, 44., 0.0001, 0.01
**
** PREDEFINED FIELDS
**
** Name: Curing   Type: Temperature
*Temperature, amplitude=Temp_up
Set-5, 1.
**
** OUTPUT REQUESTS
**
*Restart, write, frequency=0
**
** FIELD OUTPUT: F-Output-1
**
*Output, field
*Node Output
CF, NT, RF, U
*Element Output, directions=YES
LE, MISES, PE, PEEQ, PEMAG, S, SDV, TEMP
*Contact Output
CDISP, CSTRESS
**
** HISTORY OUTPUT: H-Output-1
**
*Output, history, variable=PRESELECT
*End Step
** ----------------------------------------------------------------
**
** STEP: Temp_down
**
*Step, name=Temp_down, nlgeom=YES, inc=50000
*Static
0.01, 44., 0.00044, 0.01
**
** PREDEFINED FIELDS
**
** Name: Temp_down   Type: Temperature
*Temperature, amplitude=Temp_down
Set-19, 1.
**
** OUTPUT REQUESTS
**
*Restart, write, frequency=0
**
** FIELD OUTPUT: F-Output-1
**
*Output, field
*Node Output
CF, NT, RF, U
*Element Output, directions=YES
LE, MISES, PE, PEEQ, PEMAG, S, SDV, TEMP
*Contact Output
CDISP, CSTRESS
**
** HISTORY OUTPUT: H-Output-1
**
*Output, history, variable=PRESELECT
*End Step
